<?xml version="1.0"?>
<!--
  File:     ASH-62IR.xml
  Author:   Aero-Matic v 0.8 & Yurik V. Nikiforoff

  Inputs:
    name:           ASH-62IR
    type:           piston
    power:          1000.0 hp
    augmented?      no
    injected?       no
-->

<piston_engine name="ASH-62IR">
  <minmp unit="INHG">          6.0 </minmp>
  <maxmp unit="INHG">         41.4 </maxmp>
  <displacement unit="IN3"> 1600.00 </displacement>
  <maxhp>        1000.00 </maxhp>
  <cycles>         2.0 </cycles>
  <idlerpm>     500.0 </idlerpm>
  <maxthrottle>    1.0 </maxthrottle>
  <minthrottle>    0.1 </minthrottle>
</piston_engine>
