<?xml version="1.0"?>
<!-- Generated by Aero-Matic v 0.8

     Inputs:
                horsepower: 1000.0
                     pitch: variable
            max engine rpm: 2200
        prop diameter (ft): 11.8116

     Outputs:
              max prop rpm:1588.52
                gear ratio:   1.38
                       Cp0:0.054210
                       Ct0:0.046621
       static thrust (lbs):1512.55
-->

<propeller name="prop">
  <ixx>19.1915 </ixx>
  <diameter unit="IN">141.7 </diameter>
  <numblades> 4 </numblades>
  <gearratio>1.38 </gearratio>
  <minpitch> 5 </minpitch>
  <maxpitch> 30 </maxpitch>

  <table name="C_THRUST" type="internal">
      <tableData>
             5      12       34
       0.0   0.04   0.0932   0.156
       0.1   0.04   0.0856   0.156
       0.2   0.03   0.0776   0.156
       0.3   0.03   0.0646   0.155
       0.4   0.02   0.0490   0.154
       0.5   0.01   0.0324   0.1523
       0.6   0.007   0.0144   0.144
       0.7   -0.0006   -0.0012   0.123
       0.8   -0.02   -0.0276   0.1152
       1.0   -0.03   -0.06   0.0765
       1.2   -0.05   -0.098   0.04086
       1.4   -0.07   -0.13   0.00288
       1.6   -0.08   -0.17   -0.03348
       1.8   -0.1   -0.214   -0.06984
       2.0   -0.12   -0.252   -0.108
       2.2   -0.14   -0.289   -0.1465
       2.4   -0.16   -0.3264   -0.1856
      </tableData>
  </table>

  <table name="C_POWER" type="internal">
     <tableData>
            5   12         34
       0.0  0.025    0.0542   0.1142
       0.1  0.025    0.0542   0.1142
       0.2  0.025    0.0517   0.1142
       0.3  0.024    0.0491   0.1142
       0.4  0.022    0.0432   0.1142
       0.5  0.017    0.0356   0.1130
       0.6  0.0144    0.0288   0.1117
       0.7  0.008    0.0170   0.1092
       0.8  0.0034    0.0068   0.1040
       1.0  -0.01    -0.0203   0.0850
       1.2  -0.03    -0.0593   0.0571
       1.4  -0.055    -0.1100   0.0286
       1.6  -0.08    -0.1626   -0.0025
       1.8  -0.1    -0.2168   -0.0697
       2.0  -0.13    -0.2711   -0.1393
       2.2  -0.16    -0.3253   -0.2090
       2.4  -0.18    -0.3795   -0.2787
     </tableData>
  </table>

</propeller>
