<?xml version="1.0"?>
<?xml-stylesheet type="text/xsl" href="http://jsbsim.sourceforge.net/JSBSim.xsl"?>
<fdm_config name="AN-2" version="2.0" release="ALPHA"
   xmlns:xsi="http://www.w3.org/2001/XMLSchema-instance"
   xsi:noNamespaceSchemaLocation="http://jsbsim.sourceforge.net/JSBSim.xsd">

 <fileheader>
  <author> Yurik V. Nikiforoff and Aeromatic v 0.9 </author>
  <filecreationdate> apr 2007 </filecreationdate>
  <version> 0.2 </version>
  <description>Legendary Russian AN-2</description>
 </fileheader>

<!--
  File:     AN-2.xml
  Inputs:
    name:          AN-2
    type:          light twin
    max weight:    12127.5 lb
    wing span:     59.61577 ft
    length:        40.6844 ft
    wing area:     769.9128 sq-ft
    gear type:     taildragger
    retractable?:  no
    # engines:     1
    engine type:   piston
    engine layout: forward fuselage
    yaw damper?    no

  Outputs:
    wing loading:  15.75 lb/sq-ft
    CL-alpha:      4.8 per radian
    CL-0:          0.24
    CL-max:        1.3
    CD-0:          0.029
    K:             0.041

-->

 <metrics>
<!--   <wingarea  unit="FT2">  769.91 </wingarea>-->
   <wingarea  unit="FT2">  900 </wingarea>
   <wingspan  unit="FT" >   59.62 </wingspan>
   <wing_incidence>          4.00 </wing_incidence>
   <chord     unit="FT" >   7.44 </chord>
   <htailarea unit="FT2">  162.0 </htailarea>
   <htailarm  unit="FT" >   23.62 </htailarm>
   <vtailarea unit="FT2">  138.58 </vtailarea>
   <vtailarm  unit="FT" >   20.34 </vtailarm>
   <location name="AERORP" unit="IN">
     <x> 157.5 </x>
     <y>   0.00 </y>
     <z>   0.00 </z>
   </location>
   <location name="EYEPOINT" unit="IN">
     <x> 0.00 </x>
     <y> 0.00 </y>
     <z> 0.00 </z>
   </location>
   <location name="VRP" unit="IN">
     <x>162.0</x>
     <y>0.0</y>
     <z>35.2</z>
   </location>
 </metrics>

 <mass_balance>
   <ixx unit="SLUG*FT2">     14637 </ixx>
   <iyy unit="SLUG*FT2">     11455 </iyy>
   <izz unit="SLUG*FT2">     28772 </izz>
   <ixy unit="SLUG*FT2">         0 </ixy>
   <ixz unit="SLUG*FT2">         0 </ixz>
   <iyz unit="SLUG*FT2">         0 </iyz>
   <emptywt unit="LBS" >      8000 </emptywt>
   <location name="CG" unit="IN">
     <x> 157.5</x>
     <y>   0.00 </y>
     <z> -12.21 </z>
   </location>
<pointmass name="crew" >
	   <weight unit="LBS">350</weight>
	   <location name="POINTMASS" unit = "IN">
		   <x> 100 </x>
		   <y> 0 </y>
		   <z> -12 </z>
	   </location>
</pointmass>

   <pointmass name="cargo" >
   	<weight unit="LBS">1000</weight>
   	<location name="POINTMASS" unit = "IN">
		<x> 160 </x>
		<y> 0 </y>
		<z> -12 </z>
	</location>
     </pointmass>
</mass_balance>

 <ground_reactions>

  <contact type="BOGEY" name="LEFT_MAIN">
   <location unit="IN">
     <x> 103.5 </x>
     <y>  -78.74 </y>
     <z>-88.8</z>
   </location>
   <static_friction>  0.80 </static_friction>
   <dynamic_friction> 0.50 </dynamic_friction>
   <rolling_friction> 0.02 </rolling_friction>
   <spring_coeff unit="LBS/FT">      10000.0 </spring_coeff>
   <damping_coeff unit="LBS/FT/SEC">  2425.50 </damping_coeff>
   <max_steer unit="DEG">0</max_steer>
   <brake_group>LEFT</brake_group>
   <retractable>FIXED</retractable>
 </contact>

  <contact type="BOGEY" name="RIGHT_MAIN">
   <location unit="IN">
     <x> 103.5 </x>
     <y>  78.74 </y>
     <z>-88.8</z>
   </location>
   <static_friction>  0.80 </static_friction>
   <dynamic_friction> 0.50 </dynamic_friction>
   <rolling_friction> 0.02 </rolling_friction>
   <spring_coeff unit="LBS/FT">      10000.0 </spring_coeff>
   <damping_coeff unit="LBS/FT/SEC">  2425.50 </damping_coeff>
   <max_steer unit="DEG">0</max_steer>
   <brake_group>RIGHT</brake_group>
   <retractable>FIXED</retractable>
 </contact>

  <contact type="BOGEY" name="TAIL">
   <location unit="IN">
     <x> 433.07 </x>
     <y>   0.00 </y>
     <z>-27.5</z>
   </location>
   <static_friction>  0.80 </static_friction>
   <dynamic_friction> 0.50 </dynamic_friction>
   <rolling_friction> 0.02 </rolling_friction>
   <!--<spring_coeff unit="LBS/FT">      12127.50 </spring_coeff>-->
   <spring_coeff unit="LBS/FT">      7000.50 </spring_coeff>
   <damping_coeff unit="LBS/FT/SEC">  1000.00 </damping_coeff>
   <max_steer unit="DEG"> -10.00 </max_steer>
   <brake_group>NONE</brake_group>
   <retractable>FIXED</retractable>
 </contact>

  <contact type="STRUCTURE" name="LEFT_WING">
    <location unit="IN">
     <x> 157.5 </x>
     <y> -384.6 </y>
     <z> 0 </z>
    </location>
    <static_friction>  0.80 </static_friction>
    <dynamic_friction> 0.50 </dynamic_friction>
    <spring_coeff unit="LBS/FT">      12127.50 </spring_coeff>
    <damping_coeff unit="LBS/FT/SEC">  2425.50 </damping_coeff>
 </contact>

  <contact type="STRUCTURE" name="RIGHT_WING">
    <location unit="IN">
     <x> 157.5 </x>
     <y>  384.6 </y>
     <z> 0 </z>
    </location>
    <static_friction>  0.80 </static_friction>
    <dynamic_friction> 0.50 </dynamic_friction>
    <spring_coeff unit="LBS/FT">      12127.50</spring_coeff>
    <damping_coeff unit="LBS/FT/SEC">  2425.50</damping_coeff>
 </contact>

 </ground_reactions>

 <propulsion>

<engine file="ASH-62IR">
    <location unit="IN">
      <x>  36.00 </x>
      <y>   0.00 </y>
      <z>   0.00 </z>
    </location>
    <orient unit="DEG">
      <pitch> 0.00 </pitch>
      <roll>   0.00 </roll>
      <yaw>   0.00 </yaw>
    </orient>
    <feed>0</feed>
    <thruster file="AV-2">
     <location unit="IN">
       <x>  36.00 </x>
       <y>   0.00 </y>
       <z>   0.00 </z>
     </location>
     <orient unit="DEG">
       <pitch> 0.00 </pitch>
       <roll>   0.00 </roll>
       <yaw>   0.00 </yaw>
     </orient>
    </thruster>
  </engine>

  <tank type="FUEL" number="0">
	  <location unit="IN">
		  <x> 157.5 </x>
		  <y> 0.00 </y>
		  <z> 0 </z>
	  </location>
	  <capacity unit="LBS"> 10.00 </capacity>
	  <contents unit="LBS"> 0.00 </contents>
  </tank>

  <tank type="FUEL" number="1">
     <location unit="IN">
	     <x> 157.5 </x>
       <y>   70.00 </y>
       <z> 0 </z>
     </location>
     <capacity unit="LBS"> 1300.00 </capacity>
     <contents unit="LBS"> 0.00 </contents>
  </tank>

  <tank type="FUEL" number="2">
     <location unit="IN">
       <x> 157.5 </x>
       <y>   -70.00 </y>
       <z> 0 </z>
     </location>
     <capacity unit="LBS"> 1300.00 </capacity>
     <contents unit="LBS"> 0.00 </contents>
  </tank>

 </propulsion>

 <flight_control name="FCS: AN-2">

  <channel name="Pitch">
   <summer name="Pitch Trim Sum">
      <input>fcs/elevator-cmd-norm</input>
      <input>fcs/pitch-trim-cmd-norm</input>
      <clipto>
        <min> -1 </min>
        <max>  1 </max>
      </clipto>
      <output>fcs/elevator-pos-norm</output>
   </summer>

   <aerosurface_scale name="Elevator Control">
      <input>fcs/pitch-trim-sum</input>
      <range>
        <min> -0.35 </min>
        <max>  0.30 </max>
      </range>
      <output>fcs/elevator-pos-rad</output>
   </aerosurface_scale>

  </channel>

  <channel name="Roll">
   <summer name="Roll Trim Sum">
      <input>fcs/aileron-cmd-norm</input>
      <input>fcs/roll-trim-cmd-norm</input>
      <clipto>
        <min> -1 </min>
        <max>  1 </max>
      </clipto>
   </summer>

   <aerosurface_scale name="Left Aileron Control">
      <input>fcs/roll-trim-sum</input>
      <range>
        <min> -0.35 </min>
        <max>  0.35 </max>
      </range>
      <output>fcs/left-aileron-pos-rad</output>
   </aerosurface_scale>
   <aerosurface_scale name="Left Aileron Control norm">
      <input>fcs/roll-trim-sum</input>
      <range>
        <min> -1 </min>
        <max>  1 </max>
      </range>
      <output>fcs/left-aileron-pos-norm</output>
   </aerosurface_scale>

   <aerosurface_scale name="Right Aileron Control">
      <input>fcs/roll-trim-sum</input>
      <range>
        <min> -0.35 </min>
        <max>  0.35 </max>
      </range>
      <output>fcs/right-aileron-pos-rad</output>
   </aerosurface_scale>
   <aerosurface_scale name="Right Aileron Control norm">
      <input>fcs/roll-trim-sum</input>
      <range>
        <min> -1 </min>
        <max>  1 </max>
      </range>
      <output>fcs/right-aileron-pos-norm</output>
   </aerosurface_scale>

  </channel>

  <channel name="Yaw">
   <summer name="Rudder Command Sum">
      <input>fcs/rudder-cmd-norm</input>
      <input>fcs/yaw-trim-cmd-norm</input>
      <limit>
        <min> -0.35 </min>
        <max>  0.35 </max>
      </limit>
   </summer>

   <aerosurface_scale name="Rudder Control">
      <input>fcs/rudder-command-sum</input>
      <range>
        <min> -0.35 </min>
        <max>  0.35 </max>
      </range>
      <output>fcs/rudder-pos-rad</output>
   </aerosurface_scale>

   <aerosurface_scale name="Rudder Sum">
      <input>fcs/rudder-command-sum</input>
      <range>
        <min> -1 </min>
        <max>  1 </max>
      </range>
      <output>fcs/rudder-pos-norm</output>
   </aerosurface_scale>

  </channel>

        <channel name="Flaps">
            <kinematic name="Flaps Control">
                <input>fcs/flap-cmd-norm</input>
                <traverse>
                    <setting>
                        <position>0</position>
                        <time>0</time>
                    </setting>
                    <setting>
                        <position>10</position>
                        <time>3.05</time>
                    </setting>
                    <setting>
                        <position>20</position>
                        <time>3.05</time>
                    </setting>
                    <setting>
                        <position>30</position>
                        <time>3.05</time>
                    </setting>
		    <setting>
			 <position>40</position>
			 <time>3.05</time>
		    </setting>

                </traverse>
                <output>fcs/flap-pos-deg</output>
            </kinematic>
            <aerosurface_scale name="Flap Position Normalizer">
              <input>fcs/flap-pos-deg</input>
              <domain>
                <min>0</min>  <!-- Flaps actual minimum position -->
                <max>40</max>  <!-- Flaps actual maximum position -->
              </domain>
              <range>
                <min>0</min>  <!-- Flaps normalized minimum position -->
                <max>1</max>  <!-- Flaps normalized maximum position -->
              </range>
              <output>fcs/flap-pos-norm</output>
            </aerosurface_scale>
        </channel>

  <channel name="Landing Gear">
  </channel>

  <channel name="Speedbrake">
   <kinematic name="Speedbrake Control">
     <input>fcs/speedbrake-cmd-norm</input>
     <traverse>
       <setting>
          <position> 0 </position>
          <time>     0 </time>
       </setting>
       <setting>
          <position> 1 </position>
          <time>     1 </time>
       </setting>
     </traverse>
     <output>fcs/speedbrake-pos-norm</output>
   </kinematic>
  </channel>

 </flight_control>

 <aerodynamics>

<function name="aero/function/kCLge">
 <description>Change_in_lift_due_to_ground_effect</description>
  <product>
   <table>
    <independentVar>aero/h_b-mac-ft</independentVar>
     <tableData>
       0.0000 1.2030
       0.1000 1.1270
       0.1500 1.0900
       0.2000 1.0730
       0.3000 1.0460
       0.4000 1.0550
       0.5000 1.0190
       0.6000 1.0130
       0.7000 1.0080
       0.8000 1.0060
       0.9000 1.0030
       1.0000 1.0020
       1.1000 1.0000
     </tableData>
  </table>
</product>
</function>

<axis name="LIFT">
<function name="aero/coefficient/CLalpha">
<description>Lift_due_to_alpha</description>
<product>
<property>aero/qbar-psf</property>
<property>metrics/Sw-sqft</property>
<property>aero/function/kCLge</property>
<table>
<independentVar lookup="row">aero/alpha-rad</independentVar>
<independentVar lookup="column">fcs/speedbrake-pos-norm</independentVar>

<tableData>
              0     1
       -0.349 -0.39 -0.39
       -0.332 -0.38 -0.38
       -0.314 -0.37 -0.37
       -0.297 -0.36 -0.36
       -0.28 -0.35 -0.35
       -0.27 -0.35 -0.35
       -0.24 -0.58 -0.58
       -0.23 -0.62 -0.62
       -0.21 -0.55 -0.55
       -0.19 -0.50 -0.50
       -0.17 -0.42 -0.42
       -0.09 -0.1 -0.1
       0.0 0.23 0.23
       0.09 0.57 0.57
       0.17 0.8 0.8
       0.24 1.15 1.15
       0.28 1.27 1.28
       0.3 1.3 1.31
       0.31 1.32 1.32
       0.33 1.33 1.41
       0.35 1.32 1.5
       0.37 1.3 1.58
       0.38 1.29 1.62
       0.42 1.24 1.65
       0.45 1.15 1.62
       0.49 1.08 1.5
       0.52 0.99 1.3
</tableData>
</table>
</product>
</function>

	<function name="aero/coefficient/dCLflap">
		<description>Delta_Lift_due_to_flaps</description>
		<product>
			<property>aero/qbar-psf</property>
			<property>metrics/Sw-sqft</property>
			<property>fcs/flap-pos-deg</property>
			<value> 0.03 </value>
		</product>
	</function>

	<function name="aero/coefficient/dCLsb">
		<description>Delta_Lift_due_to_speedbrake</description>
		<product>
			<property>aero/qbar-psf</property>
			<property>metrics/Sw-sqft</property>
			<property>fcs/speedbrake-pos-norm</property>
			<value>0</value>
		</product>
	</function>

	<function name="aero/coefficient/CLde">
		<description>Lift_due_to_Elevator_Deflection</description>
		<product>
			<property>aero/qbar-psf</property>
			<property>metrics/Sw-sqft</property>
			<property>fcs/elevator-pos-rad</property>
			<value>0.2</value>
		</product>
	</function>

</axis>


  <axis name="DRAG">

    <function name="aero/coefficient/CD0">
       <description>Drag_at_zero_lift</description>
       <product>
          <property>aero/qbar-psf</property>
          <property>metrics/Sw-sqft</property>
          <table>
            <independentVar lookup="row">aero/alpha-rad</independentVar>
            <tableData>
             -1.57       1.500
             -0.26    0.038
              0.00    0.029
              0.26    0.038
              1.57       1.500
            </tableData>
          </table>
       </product>
    </function>

    <function name="aero/coefficient/CDi">
       <description>Induced_drag</description>
         <product>
           <property>aero/qbar-psf</property>
           <property>metrics/Sw-sqft</property>
           <property>aero/cl-squared</property>
           <value>0.041</value>
         </product>
    </function>

    <function name="aero/coefficient/CDmach">
       <description>Drag_due_to_mach</description>
        <product>
          <property>aero/qbar-psf</property>
          <property>metrics/Sw-sqft</property>
          <table>
            <independentVar lookup="row">velocities/mach</independentVar>
            <tableData>
                0.00      0.000
                0.72      0.000
                1.10      0.023
                1.80      0.015
            </tableData>
          </table>
        </product>
    </function>

    <function name="aero/coefficient/CDflap">
       <description>Drag_due_to_flaps</description>
         <product>
           <property>aero/qbar-psf</property>
           <property>metrics/Sw-sqft</property>
           <property>fcs/flap-pos-deg</property>
           <value> 0.00130 </value>
         </product>
    </function>

    <function name="aero/coefficient/CDsb">
       <description>Drag_due_to_speedbrakes</description>
         <product>
           <property>aero/qbar-psf</property>
           <property>metrics/Sw-sqft</property>
           <property>fcs/speedbrake-pos-norm</property>
           <value>0.03</value>
         </product>
    </function>

    <function name="aero/coefficient/CDbeta">
       <description>Drag_due_to_sideslip</description>
       <product>
          <property>aero/qbar-psf</property>
          <property>metrics/Sw-sqft</property>
          <table>
            <independentVar lookup="row">aero/beta-rad</independentVar>
            <tableData>
              -1.57       1.230
              -0.26    0.050
               0.00       0.000
               0.26    0.050
               1.57       1.230
            </tableData>
          </table>
       </product>
    </function>

    <function name="aero/coefficient/CDde">
       <description>Drag_due_to_Elevator_Deflection</description>
       <product>
           <property>aero/qbar-psf</property>
           <property>metrics/Sw-sqft</property>
           <property>fcs/elevator-pos-norm</property>
           <value>0.04</value>
       </product>
    </function>

  </axis>

  <axis name="SIDE">

    <function name="aero/coefficient/CYb">
       <description>Side_force_due_to_beta</description>
       <product>
           <property>aero/qbar-psf</property>
           <property>metrics/Sw-sqft</property>
           <property>aero/beta-rad</property>
           <value>-1</value>
       </product>
    </function>

  </axis>

  <axis name="ROLL">

    <function name="aero/coefficient/Clb">
       <description>Roll_moment_due_to_beta</description>
       <product>
           <property>aero/qbar-psf</property>
           <property>metrics/Sw-sqft</property>
           <property>metrics/bw-ft</property>
           <property>aero/beta-rad</property>
           <value>-0.1</value>
       </product>
    </function>

    <function name="aero/coefficient/Clp">
       <description>Roll_moment_due_to_roll_rate</description>
       <product>
           <property>aero/qbar-psf</property>
           <property>metrics/Sw-sqft</property>
           <property>metrics/bw-ft</property>
           <property>aero/bi2vel</property>
           <property>velocities/p-aero-rad_sec</property>
           <value>-0.4</value>
       </product>
    </function>

    <function name="aero/coefficient/Clr">
       <description>Roll_moment_due_to_yaw_rate</description>
       <product>
           <property>aero/qbar-psf</property>
           <property>metrics/Sw-sqft</property>
           <property>metrics/bw-ft</property>
           <property>aero/bi2vel</property>
           <property>velocities/r-aero-rad_sec</property>
           <value>0.15</value>
       </product>
    </function>

    <function name="aero/coefficient/Clda">
       <description>Roll_moment_due_to_aileron</description>
       <product>
          <property>aero/qbar-psf</property>
          <property>metrics/Sw-sqft</property>
          <property>metrics/bw-ft</property>
          <property>fcs/left-aileron-pos-rad</property>
          <value>0.1</value>
       </product>
    </function>

    <function name="aero/coefficient/Cldr">
       <description>Roll_moment_due_to_rudder</description>
       <product>
           <property>aero/qbar-psf</property>
           <property>metrics/Sw-sqft</property>
           <property>metrics/bw-ft</property>
           <property>fcs/rudder-pos-rad</property>
           <value>0.01</value>
       </product>
    </function>
  </axis>


  <axis name="PITCH">

    <function name="aero/coefficient/Cmalpha">
       <description>Pitch_moment_due_to_alpha</description>
       <product>
           <property>aero/qbar-psf</property>
           <property>metrics/Sw-sqft</property>
           <property>metrics/cbarw-ft</property>
           <property>aero/alpha-rad</property>
           <value>-0.4</value>
       </product>
    </function>

    <function name="aero/coefficient/Cmde">
       <description>Pitch_moment_due_to_elevator</description>
       <product>
          <property>aero/qbar-psf</property>
          <property>metrics/Sw-sqft</property>
          <property>metrics/cbarw-ft</property>
          <property>fcs/elevator-pos-rad</property>
          <value>-0.7</value>
       </product>
    </function>

    <function name="aero/coefficient/Cmq">
       <description>Pitch_moment_due_to_pitch_rate</description>
       <product>
           <property>aero/qbar-psf</property>
           <property>metrics/Sw-sqft</property>
           <property>metrics/cbarw-ft</property>
           <property>aero/ci2vel</property>
           <property>velocities/q-aero-rad_sec</property>
           <value>-22</value>
       </product>
    </function>

    <function name="aero/coefficient/Cmadot">
       <description>Pitch_moment_due_to_alpha_rate</description>
       <product>
           <property>aero/qbar-psf</property>
           <property>metrics/Sw-sqft</property>
           <property>metrics/cbarw-ft</property>
           <property>aero/ci2vel</property>
           <property>aero/alphadot-rad_sec</property>
           <value>-8</value>
       </product>
    </function>

  </axis>

  <axis name="YAW">

    <function name="aero/coefficient/Cnb">
       <description>Yaw_moment_due_to_beta</description>
       <product>
           <property>aero/qbar-psf</property>
           <property>metrics/Sw-sqft</property>
           <property>metrics/bw-ft</property>
           <property>aero/beta-rad</property>
           <value>0.12</value>
       </product>
    </function>

    <function name="aero/coefficient/Cnr">
       <description>Yaw_moment_due_to_yaw_rate</description>
       <product>
           <property>aero/qbar-psf</property>
           <property>metrics/Sw-sqft</property>
           <property>metrics/bw-ft</property>
           <property>aero/bi2vel</property>
           <property>velocities/r-aero-rad_sec</property>
           <value>-0.15</value>
       </product>
    </function>

    <function name="aero/coefficient/Cndr">
       <description>Yaw_moment_due_to_rudder</description>
       <product>
           <property>aero/qbar-psf</property>
           <property>metrics/Sw-sqft</property>
           <property>metrics/bw-ft</property>
           <property>fcs/rudder-pos-rad</property>
           <value>-0.1</value>
       </product>
    </function>

    <function name="aero/coefficient/Cnda">
       <description>Adverse_yaw</description>
       <product>
           <property>aero/qbar-psf</property>
           <property>metrics/Sw-sqft</property>
           <property>metrics/bw-ft</property>
           <property>fcs/left-aileron-pos-rad</property>
           <value>-0.01</value>
       </product>
    </function>

  </axis>

 </aerodynamics>

</fdm_config>
